// COMSOL Multiphysics 5.6.0.401 model "model_1d.mph"
// Outline of the model tree

Common definitions
  mpf1: ParticipationFactors

Geometry
  geom1 "Geometry 1" (3D, length unit m)
    ls1: LineSegment | specify1 = coord; specify2 = coord; coord2 = {1, 0, 0}
    fin: Finalize "Form Union"

Materials
  mat1: Common "Material 1" on all domains
    def "Basic"
      youngsmodulus = 71e9
      poissonsratio = 0.33
      density = 2.71e3

Physics
  beam: HermitianBeam on all edges
    dependent variable u2 = {u2, v2, w2}
    emm1: Elastic "Linear Elastic Material 1" (default)
      E_mat = userdef
      E = 71e9
      nu_mat = userdef
      nu = 0.33
      rho_mat = userdef
      rho = 2.71e3
    csd1: CrossSectionBeam "Cross-Section Data 1" (default)
      CrossSectionDefinition = CommonSections
      hy_rect = 0.1
      hz_rect = 0.16
      area = 0.16
      Izz = 1.3333e-05
      so1: BeamSectionOrientation "Section Orientation 1" (default)
        OrientationMethod = vector_beam
        point_beam = {0, 1, 0}
        vector_beam = {0, 1, 0}
    free1: Free (default)
    init1: init "Initial Values 1" (default)
    fix1: Fixed "Fixed Constraint 1" on points 1
    pl1: PointLoad on points 2 | Fp = {0, 2000000, 0}

Mesh
  mesh1 "Mesh 1" (physics-controlled)

Studies
  std1 "Study 1"
    stat: Stationary | geometricNonlinearity = on
  std2 "Study 2"
    time: Transient "Time Dependent" | tlist = range(0,0.1,1)
  std3 "Study 3"
    eig: Eigenfrequency | shift = 1[Hz]; conrad = 1

Solver configurations
  sol1 "Solution 1" (study std1)
    v1: Variables "Dependent Variables 1"
    s1: Stationary "Stationary Solver 1"
      fc1: FullyCoupled | linsolver = d1; maxiter = 50
      d1: Direct "Suggested Direct Solver (solid)" | linsolver = pardiso; pivotperturb = 1.0E-9; nliniterrefine = on
  sol2 "Solution 2" (study std2)
    v1: Variables "Dependent Variables 1"
      comp1_u2: Field "Displacement field (comp1.u2)" | scalemethod = manual; scaleval = 1e-2*1.0
    t1: Time "Time-Dependent Solver 1" | tlist = range(0,0.1,1); timemethod = genalpha
      dDef: Direct
      fc1: FullyCoupled | linsolver = dDef
  sol3 "Solution 3" (study std3)
    v1: Variables "Dependent Variables 1"
    e1: Eigenvalue "Eigenvalue Solver 1" | eigvfunscale = maximum; eigvfunscaleparam = 1.0E-6
      dDef: Direct

Datasets
  dset1: Solution | solution = sol1
  dset2: Solution | solution = sol2
  cln1: CutLine3D | data = dset1
  cln2: CutLine3D | data = dset2
  dset3: Solution | solution = sol3

Evaluation groups
  std3EvgFrq: EvaluationGroup "Eigenfrequencies (Study 3)" | data = dset3
    gev1: EvalGlobal "Global Evaluation 1"
      expr = {freq*2*pi, imag(freq)/abs(freq), abs(freq)/imag(freq)/2}
      unit = {rad/s, 1, 1}
      descr = {Angular frequency, Damping ratio, Quality factor}
  std3mpf1: EvaluationGroup "Participation Factors (Study 3)" | data = dset3
    gev1: EvalGlobal "Global Evaluation 1"
      expr = {mpf1.pfLnormX, mpf1.pfLnormY, mpf1.pfLnormZ, mpf1.pfRnormX, mpf1.pfRnormY, mpf1.pfRnormZ, mpf1.mEffLX, mpf1.mEffLY, mpf1.mEffLZ, mpf1.mEffRX, mpf1.mEffRY, mpf1.mEffRZ}
      unit = {1, 1, 1, 1, 1, 1, kg, kg, kg, kg*m^2, kg*m^2, kg*m^2}
      descr = {"Participation factor, normalized, X-translation", "Participation factor, normalized, Y-translation", "Participation factor, normalized, Z-translation", "Participation factor, normalized, X-rotation", "Participation factor, normalized, Y-rotation", "Participation factor, normalized, Z-rotation", "Effective modal mass, X-translation", "Effective modal mass, Y-translation", "Effective modal mass, Z-translation", "Effective modal mass, X-rotation", "Effective modal mass, Y-rotation", "Effective modal mass, Z-rotation"}

Plots
  pg1: PlotGroup3D "Stress (solid)" | data = dset1
    surf1: Surface | expr = solid.mises
      def: Deform "Deformation" | expr = {u, v, w}; descr = Displacement field
  pg2: PlotGroup3D "Boundary Loads (solid)" | data = dset1
    arws1: ArrowSurface "Boundary Load 1" | expr = {solid.bndl1.F_Ax, solid.bndl1.F_Ay, solid.bndl1.F_Az}
      col: Color "Color Expression" | expr = solid.bndl1.F_A_Mag
      def: Deform "Deformation" | expr = {u, v, w}; descr = Displacement field
    surf1: Surface "Gray Surfaces" | expr = 1
      def: Deform "Deformation" | expr = {u, v, w}; descr = Displacement field
      sel1: Selection
      tran1: Transparency | transparency = 0.8
  pg3: PlotGroup3D "3D Plot Group 3" | data = dset1
    vol1: Volume | expr = solid.disp
  pg4: PlotGroup3D "Stress (solid) 1" | data = dset2
    surf1: Surface | expr = solid.mises
      def: Deform "Deformation" | expr = {u, v, w}; descr = Displacement field
  pg5: PlotGroup3D "Point Loads (solid)" | data = dset2
    arpt1: ArrowPoint "Point Load 1" | expr = {solid.pl1.F_Px, solid.pl1.F_Py, solid.pl1.F_Pz}
      col: Color "Color Expression" | expr = solid.pl1.F_P_Mag
      def: Deform "Deformation" | expr = {u, v, w}; descr = Displacement field
    surf1: Surface "Gray Surfaces" | expr = 1
      def: Deform "Deformation" | expr = {u, v, w}; descr = Displacement field
      sel1: Selection
      tran1: Transparency | transparency = 0.8
  pg6: PlotGroup1D "1D Plot Group 6" | data = dset1
    lngr1: LineGraph on edges 1 | data = dset1; expr = beam.disp
  pg7: PlotGroup3D "Mode Shape (beam)" | data = dset3
    line1: Line | expr = beam.disp; linetype = tube; radiusexpr = beam.re
      def: Deform "Deformation" | expr = {u2, v2, w2}; descr = Displacement field
  pg8: PlotGroup3D "Beam Orientation (beam)" | data = dset3; title = Beam approximate radius and principal axes
    line1: Line "Size" | expr = beam.re; linetype = tube; radiusexpr = beam.re
    arws1: ArrowLine "Local Y Direction (Green)"
      expr = {beam.beamsys.e_y1*beam.rgy, beam.beamsys.e_y2*beam.rgy, beam.beamsys.e_y3*beam.rgy}
    arws2: ArrowLine "Local Z Direction (Blue)"
      expr = {beam.beamsys.e_z1*beam.rgz, beam.beamsys.e_z2*beam.rgz, beam.beamsys.e_z3*beam.rgz}

Exports
  anim1: Animation | target = player; framesel = all