// COMSOL Multiphysics 5.6.0.401 model "beam_2d.mph"
// Outline of the model tree

Geometry
  geom1 "Geometry 1" (2D, length unit m)
    r1: Rectangle | size = {1, 0.05}
    fin: Finalize "Form Union"

Materials
  mat1: Common "1050 [solid]" on all domains
    def "Basic"
      thermalconductivity = k_solid_1(T[1/K])[W/(m*K)]
      resistivity = res_solid_1(T[1/K])[ohm*m]
      thermalexpansioncoefficient = (alpha_solid_1(T[1/K])[1/K]+(Tempref-293[K])*if(abs(T-Tempref)>1e-3,(alpha_solid_1(T[1/K])[1/K]-alpha_solid_1(Tempref[1/K])[1/K])/(T-Tempref),d(alpha_solid_1(T[1/K])[1/K],T)))/(1+alpha_solid_1(Tempref[1/K])[1/K]*(Tempref-293[K]))
      heatcapacity = C_solid_1(T[1/K])[J/(kg*K)]
      electricconductivity = sigma_solid_1(T[1/K])[S/m]
      HC = HC_solid_1(T[1/K])[J/(mol*K)]
      VP = VP_solid_1(T[1/K])[Pa]
      emissivity = epsilon(T[1/K])
      density = rho_solid_1(T[1/K])[kg/m^3]
      TD = TD(T[1/K])[m^2/s]
      k_solid_1: Piecewise | arg = T; pieces = {293.0, 933.0, 39.64599+1.684012*T^1-0.005413421*T^2+8.431302E-6*T^3-6.537049E-9*T^4+2.002031E-12*T^5}
      res_solid_1: Piecewise
        arg = T
        pieces = 
          {1.0, 20.0, 1.091612E-12-1.10726E-13*T^1+3.696901E-14*T^2-2.781934E-15*T^3+1.008733E-16*T^4}
          {20.0, 50.0, -3.313487E-11+7.29041E-12*T^1-4.771551E-13*T^2+1.071535E-14*T^3}
          {50.0, 200.0, 1.0965563E-10-3.988929E-11*T^1+1.061978E-12*T^2-2.337666E-15*T^3}
          {200.0, 933.0, -1.037048E-8+1.451201E-10*T^1-8.192563E-14*T^2+6.619834E-17*T^3}
      alpha_solid_1: Piecewise
        arg = T
        pieces = 
          {20.0, 220.0, 1.371347E-5+7.808536E-8*T^1-2.568882E-10*T^2+3.615726E-13*T^3}
          {220.0, 610.0, 5.760185E-6+1.707141E-7*T^1-6.548135E-10*T^2+1.220625E-12*T^3-1.064883E-15*T^4+3.535918E-19*T^5}
          {610.0, 933.0, 1.9495E-5+9.630182E-9*T^1+9.462013E-13*T^2}
      C_solid_1: Piecewise
        arg = T
        pieces = 
          {100.0, 320.0, -290.416126+11.1810036*T^1-0.0412540099*T^2+7.11275398E-5*T^3-4.60821994E-8*T^4}
          {320.0, 933.0, 595.658507+1.51302896*T^1-0.00207006538*T^2+1.30360846E-6*T^3}
      sigma_solid_1: Piecewise
        arg = T
        pieces = 
          {1.0, 20.0, 1/(1.008733E-16*T^4-2.781934E-15*T^3+3.696901E-14*T^2-1.107260E-13*T+1.091612E-12)}
          {20.0, 50.0, 1/(1.071535E-14*T^3-4.771551E-13*T^2+7.290410E-12*T-3.313487E-11)}
          {50.0, 200.0, 1/(-2.337666E-15*T^3+1.061978E-12*T^2-3.988929E-11*T+1.0965563E-10)}
          {200.0, 933.0, 1/(6.619834E-17*T^3-8.192563E-14*T^2+1.451201E-10*T-1.037048E-08)}
      HC_solid_1: Piecewise
        arg = T
        pieces = 
          {100.0, 320.0, -7.83586214+0.301680207*T^1-0.00111309504*T^2+1.91912758E-6*T^3-1.24336723E-9*T^4}
          {320.0, 933.0, 16.0717565+0.0408237901*T^1-5.58534712E-5*T^2+3.51733064E-8*T^3}
      VP_solid_1: Piecewise | arg = T; pieces = {293.0, 933.0, (exp((-1.73420000e+04/T-7.92700000e-01*log10(T)+1.23398100e+01)*log(10.0)))*1.33320000e+02}
      epsilon: Piecewise | arg = T; pieces = {175.0, 700.0, -0.006159012+1.209023E-4*T^1-1.728543E-7*T^2+1.274369E-10*T^3}
      rho_solid_1: Piecewise
        arg = T
        pieces = 
          {20.0, 130.0, 2734.317-0.02751647*T^1+0.001016054*T^2-1.700864E-5*T^3+5.734155E-8*T^4}
          {130.0, 933.0, 2736.893-0.006011681*T^1-7.012444E-4*T^2+1.3582E-6*T^3-1.367828E-9*T^4+5.177991E-13*T^5}
      TD: Piecewise | arg = T; pieces = {293.0, 933.0, 5.850406E-5+4.372409E-7*T^1-1.684332E-9*T^2+2.848785E-12*T^3-2.339518E-15*T^4+7.401871E-19*T^5}
    ThermalExpansion
      alphatan = CTE(T[1/K])[1/K]
      dL = (dL_solid_1(T[1/K])-dL_solid_1(Tempref[1/K]))/(1+dL_solid_1(Tempref[1/K]))
      dL_solid_1: Piecewise
        arg = T
        pieces = 
          {20.0, 188.0, -0.004116601-4.000347E-6*T^1+5.370388E-8*T^2+3.714324E-10*T^3-1.45073E-12*T^4}
          {188.0, 933.0, -0.00631208932+2.156284E-5*T^1-4.744254E-9*T^2+1.811015E-11*T^3-7.336673E-15*T^4}
      CTE: Piecewise
        arg = T
        pieces = 
          {20.0, 79.0, -3.317274E-6+3.068688E-7*T^1-1.004816E-8*T^2+1.724768E-10*T^3-8.846061E-13*T^4}
          {79.0, 230.0, -2.288239E-5+6.674915E-7*T^1-4.402622E-9*T^2+1.455358E-11*T^3-1.910622E-14*T^4}
          {230.0, 900.0, 1.243109E-5+5.050772E-8*T^1-5.806556E-11*T^2+3.014305E-14*T^3}
    Enu "Young's modulus and Poisson's ratio"
      youngsmodulus = E(T[1/K])[Pa]
      poissonsratio = nu(T[1/K])
      E: Piecewise | arg = T; pieces = {0.0, 773.0, 7.770329E10+2036488.0*T^1-189160.7*T^2+425.2931*T^3-0.3545736*T^4}
      nu: Piecewise | arg = T; pieces = {0.0, 773.0, 0.3238668+3.754548E-6*T^1+2.213647E-7*T^2-6.565023E-10*T^3+4.21277E-13*T^4+3.170505E-16*T^5}
    KG "Bulk modulus and shear modulus"
      K = kappa(T[1/K])[Pa]
      G = mu(T[1/K])[Pa]
      mu: Piecewise | arg = T; pieces = {0.0, 773.0, 2.936605E10-121772.0*T^1-70037.91*T^2+160.9718*T^3-0.1368524*T^4}
      kappa: Piecewise | arg = T; pieces = {0.0, 773.0, 7.35752E10+1900026.0*T^1-72136.97*T^2+53.47482*T^3}

Physics
  solid: SolidMechanics on all domains
    dependent variable u = {u, v, w}
    lemm1: LinearElasticModel "Linear Elastic Material 1" (default)
      dmp1: Damping on all domains | alpha_dM = 0.2; beta_dK = 0
    free1: Free (default)
    init1: init "Initial Values 1" (default)
    fix1: Fixed "Fixed Constraint 1" on boundaries 1
    pl1: PointLoad on points 4

Mesh
  mesh1 "Mesh 1" (physics-controlled)
    size: MeshSizeDefault | hauto = 3

Studies
  std1 "Study 1"
    stat: Stationary | geometricNonlinearity = on
  std2 "Study 2"
    time: Transient "Time Dependent" | tlist = range(0,0.1,1); geometricNonlinearity = on

Solver configurations
  sol1 "Solution 1" (study std1)
    v1: Variables "Dependent Variables 1"
    s1: Stationary "Stationary Solver 1"
      dDef: Direct
      fc1: FullyCoupled | linsolver = dDef
  sol2 "Solution 2" (study std2)
    v1: Variables "Dependent Variables 1"
      comp1_u: Field "Displacement field (comp1.u)" | scalemethod = manual; scaleval = 1e-2*1.00124921973
    t1: Time "Time-Dependent Solver 1" | tlist = range(0,0.1,1); timemethod = genalpha
      dDef: Direct
      fc1: FullyCoupled | linsolver = dDef

Datasets
  dset1: Solution | solution = sol1
  dset2: Solution | solution = sol2

Plots
  pg1: PlotGroup2D "Stress (solid)" | data = dset1
    surf1: Surface | expr = solid.mises
      def: Deform "Deformation" | expr = {u, v}; descr = Displacement field
  pg2: PlotGroup2D "Point Loads (solid)" | data = dset1
    arpt1: ArrowPoint "Point Load 1" | expr = {solid.pl1.F_Px, solid.pl1.F_Py}
      col: Color "Color Expression" | expr = solid.pl1.F_P_Mag
      def: Deform "Deformation" | expr = {u, v}; descr = Displacement field
    surf1: Surface "Gray Surfaces" | expr = 1
      def: Deform "Deformation" | expr = {u, v}; descr = Displacement field
      sel1: Selection on domains 1
  pg3: PlotGroup2D "Stress (solid) 1" | data = dset2
    surf1: Surface | expr = solid.mises
      def: Deform "Deformation" | expr = {u, v}; descr = Displacement field
  pg4: PlotGroup2D "Point Loads (solid) 1" | data = dset2
    arpt1: ArrowPoint "Point Load 1" | expr = {solid.pl1.F_Px, solid.pl1.F_Py}
      col: Color "Color Expression" | expr = solid.pl1.F_P_Mag
      def: Deform "Deformation" | expr = {u, v}; descr = Displacement field
    surf1: Surface "Gray Surfaces" | expr = 1
      def: Deform "Deformation" | expr = {u, v}; descr = Displacement field
      sel1: Selection on domains 1