// COMSOL Multiphysics 5.6.0.401 model "model_3d_v2.mph"
// Outline of the model tree

Geometry
  geom1 "Geometry 1" (3D, length unit m)
    blk1: Block | size = {0.16, 2, 0.1}
    pt1: Point | p = {0.08, 2, 0.05}
    fin: Finalize "Form Union"

Materials
  mat1: Common "Material 1" on all domains
    def "Basic"
      youngsmodulus = 71e9
      poissonsratio = 0.33
      density = 2.71e3

Physics
  solid: SolidMechanics on all domains
    dependent variable u = {u, v, w}
    lemm1: LinearElasticModel "Linear Elastic Material 1" (default)
      dmp1: Damping on all domains | alpha_dM = 0.001; beta_dK = 0.01
    free1: Free (default)
    init1: init "Initial Values 1" (default)
    fix1: Fixed "Fixed Constraint 1" on boundaries 2
    pl1: PointLoad on points 5 | Fp = {0, 0, 400000}

Mesh
  mesh1 "Mesh 1" (physics-controlled)
    size: MeshSizeDefault | hauto = 4

Studies
  std1 "Study 1"
    stat: Stationary | geometricNonlinearity = on
  std2 "Study 2"
    time: Transient "Time Dependent" | tlist = range(0,0.1,1)

Solver configurations
  sol1 "Solution 1" (study std1)
    v1: Variables "Dependent Variables 1"
    s1: Stationary "Stationary Solver 1"
      fc1: FullyCoupled | linsolver = d1; maxiter = 50
      d1: Direct "Suggested Direct Solver (solid)" | linsolver = pardiso; pivotperturb = 1.0E-9; nliniterrefine = on
  sol2 "Solution 2" (study std2)
    v1: Variables "Dependent Variables 1"
      comp1_u: Field "Displacement field (comp1.u)" | scalemethod = manual; scaleval = 1e-2*2.00888028513
    t1: Time "Time-Dependent Solver 1" | tlist = range(0,0.1,1); timemethod = genalpha
      fc1: FullyCoupled | linsolver = d1
      d1: Direct "Suggested Direct Solver (solid)" | linsolver = pardiso; pivotperturb = 1.0E-9

Datasets
  dset1: Solution | solution = sol1
  dset2: Solution | solution = sol2

Plots
  pg1: PlotGroup3D "Stress (solid)" | data = dset1
    surf1: Surface | expr = solid.mises
      def: Deform "Deformation" | expr = {u, v, w}; descr = Displacement field
  pg2: PlotGroup3D "Boundary Loads (solid)" | data = dset1
    arws1: ArrowSurface "Boundary Load 1" | expr = {solid.bndl1.F_Ax, solid.bndl1.F_Ay, solid.bndl1.F_Az}
      col: Color "Color Expression" | expr = solid.bndl1.F_A_Mag
      def: Deform "Deformation" | expr = {u, v, w}; descr = Displacement field
    surf1: Surface "Gray Surfaces" | expr = 1
      def: Deform "Deformation" | expr = {u, v, w}; descr = Displacement field
      sel1: Selection on boundaries 1-6
      tran1: Transparency | transparency = 0.8
  pg3: PlotGroup3D "3D Plot Group 3" | data = dset1
    vol1: Volume | expr = solid.disp
  pg4: PlotGroup3D "Stress (solid) 1" | data = dset2
    surf1: Surface | expr = solid.mises
      def: Deform "Deformation" | expr = {u, v, w}; descr = Displacement field
  pg5: PlotGroup3D "Point Loads (solid)" | data = dset2
    arpt1: ArrowPoint "Point Load 1" | expr = {solid.pl1.F_Px, solid.pl1.F_Py, solid.pl1.F_Pz}
      col: Color "Color Expression" | expr = solid.pl1.F_P_Mag
      def: Deform "Deformation" | expr = {u, v, w}; descr = Displacement field
    surf1: Surface "Gray Surfaces" | expr = 1
      def: Deform "Deformation" | expr = {u, v, w}; descr = Displacement field
      sel1: Selection on boundaries 1-6
      tran1: Transparency | transparency = 0.8